AnyMatrix PointsAffine1 = {
  {0.0, 0.0, 0.0},  // Origin
  {4.68001e-32, 3.43557e-17, 1.848893e-32}, //gh
  {-0.08790017, -0.3541837, -0.007537773}, //condylus_hum
  {-0.029131, -0.353209, 0.005119}, //condylus_humT
  //    {0.016989, 0.01898, -0.003736}, // supra 1 Ins
  //    {0.016989, 0.01898, -0.003736}, // supra 2 Ins
  //    {0.018874, 0.017911, 0.003956}, // supra 3 Ins
  //    {0.018874, 0.017911, 0.003956}, // supra 4 Ins
  //    {0.020686, 0.016879, 0.011345}, // supra 5 Ins
  //    {0.020686, 0.016879, 0.011345}, // supra 6 Ins
  {0.01629, 0.00944861, 0.01869}, // infra 1 Ins
  {0.016288, 0.009448607, 0.018695}, // infra 2 Ins
  {0.018722, 0.00182842, 0.02067}, // infra 3 Ins
  {0.01872, 0.001828424, 0.020673}, // infra 4 Ins
  {0.021354, -0.006057973, 0.022805}, // infra 5 Ins
  {0.02135, -0.00605797, 0.02281}, // infra 6 Ins
  {-0.01416, 0.004191, -0.024937}, // subscap 1 Ins
  {-0.014159, 0.004191, -0.024937}, // subscap 2 Ins
  {-0.01378, -0.006596, -0.027658}, // subscap 3 Ins
  {-0.013783, -0.006596, -0.027658}, // subscap 4 Ins
  {-0.01361, -0.011478, -0.0289}, // subscap 5 Ins
  {-0.013608, -0.011478, -0.0289}, // subscap 6 Ins
  {0.02236, -0.005187, 0.015035}, // teres minor 1 Ins
  {0.022358, -0.005187, 0.015035}, // teres minor 2 Ins
  {0.02274, -0.013359, 0.011528}, // teres minor 3 Ins
  {0.022739, -0.013359, 0.011528}, // teres minor 4 Ins
  {0.02307, -0.020224, 0.008587}, // teres minor 5 Ins
  {0.023068, -0.020224, 0.008587}, // teres minor 6 Ins
  {0.018379, 0.014001, -0.017381}, // via point 1 biceps brachii long
  {0.018879, -0.0324443, -0.008381}, // via point 2 biceps brachii long
  {-0.004633998, 0.01056599, -0.006212992}, // biceps brachii long Ins
    {-0.05156146, 1.631868, 0.1518916}, // biceps brachii long Org
  {0.01154131, -0.13516626, 0.018559281},  // DT
  {0.016696623, -0.00039992714, -0.024833431},  // LT1
  {-0.00082540943, -0.012710826, -0.027324049},  // LT2
  {0.003164069, -0.038989086, -0.016423415},  // SN
  {-0.02719984, -0.009987236, -0.012128863},  // AN1
  {0.027715547, 0.0071698367, -0.0057678716},  // GT1
  {0.020105379, 0.015216575, 0.011917557},  // GT2
  {-0.0077156438, 0.01371882, 0.021096155},  // GT3
  {-0.026538881, -0.0004654442, -0.016383749},  // AN2
  {-0.021673365, 0.014000697, -0.01353638},  // AN3
  {-0.01648457, 0.022265021, -0.0038823821},  // AN4
  {-0.01317743, 0.018507771, 0.014477503},  // AN5
  {-0.018262619, 0.0062037953, 0.020164777},  // AN6
  {-0.024974365, -0.0059851338, 0.015220258},  // AN7
  {-0.029651189, 0.0068230731, 0.0034415585},  // GHC
  {-0.010086371, -0.07632643, -0.0014750795},  // MLR3
  {-0.01129523, -0.19295007, 0.003155017},  // MLR2
  {0.0081443526, -0.19660154, 0.014871559},  // LRS2
  {0.017467901, -0.071833536, -0.00098610076},  // LRS3
  {-0.003902839, 0.00042691416, 0.025682045},  // GT4
  {0.007900862, 0.023408651, 0.0066904528},  // GT5
  {-0.024046257, -0.011887598, 0.013366981},  // GT6
  {0.033388257, -0.33655971, 0.010108482},  // EpicL
  {-0.03423202, -0.34266743, 0.0036992067},  // EpicM
  {-0.027809806, -0.32783696, 0.0071113692},  // EL
  {-0.015919188, -0.34472224, -0.014407583},  // Cap
  {-0.01063042, -0.34741062, -0.011738211},  // Tr1
  {-0.0047629289, -0.34615725, -0.0091299638},  // Tr2
  {0.0021650915, -0.34549543, -0.0087788701},  // Tr3
  {0.0093172612, -0.34485054, -0.0076008025},  // Tr4
  {0.020302692, -0.34592429, -0.0094405897},  // Tr5
  {-0.028273543, -0.33735278, -0.00343668},  // EM
  {-0.032413241, -0.34586412, -0.0032725355},  // EM1
  {-0.0088122943, -0.32303444, -0.0048105},  // CF1
  {-0.012343063, -0.3320491, -0.0090536661},  // CF2
  {0.018194068, -0.32882839, -0.0013741548},  // RF
  {-0.014553924, -0.26859215, 0.0064969757},  // MLR1
  {0.015702257, -0.28087083, 0.018023023},  // LSR1
  {-0.0016646972, -0.32719505, -0.00095377932},  // OF
  {-0.010277782, -0.14014132, 0.0041358843},  // MLR4

};

AnyMatrix PointsRBF1 = {
  {0.0, 0.0, 0.0},  // Origin
  {4.68001e-32, 3.43557e-17, 1.848893e-32}, //gh
  {-0.08790017, -0.3541837, -0.007537773}, //condylus_hum
  {-0.029131, -0.353209, 0.005119}, //condylus_humT
  {0.01699, 0.019 + 1*Main.InputVariables.MorphotypeParameters.SupraHumScalingFactor, -0.00374}, // supra 1 Ins
  {0.016989, 0.01898 + 1*Main.InputVariables.MorphotypeParameters.SupraHumScalingFactor, -0.003736}, // supra 2 Ins
  {0.01887, 0.01791 + 1*Main.InputVariables.MorphotypeParameters.SupraHumScalingFactor, 0.00396}, // supra 3 Ins
  {0.018874, 0.017911 + 1*Main.InputVariables.MorphotypeParameters.SupraHumScalingFactor, 0.003956}, // supra 4 Ins
  {0.02069, 0.01688 + 1*Main.InputVariables.MorphotypeParameters.SupraHumScalingFactor, 0.01134}, // supra 5 Ins
  {0.020686, 0.016879 + 1* Main.InputVariables.MorphotypeParameters.SupraHumScalingFactor, 0.011345}, // supra 6 Ins
  {0.01629, 0.00944861, 0.01869}, // infra 1 Ins
  {0.016288, 0.009448607, 0.018695}, // infra 2 Ins
  {0.018722, 0.00182842, 0.02067}, // infra 3 Ins
  {0.01872, 0.001828424, 0.020673}, // infra 4 Ins
  {0.021354, -0.006057973, 0.022805}, // infra 5 Ins
  {0.02135, -0.00605797, 0.02281}, // infra 6 Ins
  {-0.01416, 0.004191, -0.024937}, // subscap 1 Ins
  {-0.014159, 0.004191, -0.024937}, // subscap 2 Ins
  {-0.01378, -0.006596, -0.027658}, // subscap 3 Ins
  {-0.013783, -0.006596, -0.027658}, // subscap 4 Ins
  {-0.01361, -0.011478, -0.0289}, // subscap 5 Ins
  {-0.013608, -0.011478, -0.0289}, // subscap 6 Ins
  {0.02236, -0.005187, 0.015035}, // teres minor 1 Ins
  {0.022358, -0.005187, 0.015035}, // teres minor 2 Ins
  {0.02274, -0.013359, 0.011528}, // teres minor 3 Ins
  {0.022739, -0.013359, 0.011528}, // teres minor 4 Ins
  {0.02307, -0.020224, 0.008587}, // teres minor 5 Ins
  {0.023068, -0.020224, 0.008587}, // teres minor 6 Ins
  {0.018379, 0.014001, -0.017381}, // via point 1 biceps brachii long
  {0.018879, -0.0324443, -0.008381}, // via point 2 biceps brachii long
  {-0.004633998, 0.01056599, -0.006212992}, // biceps brachii long Ins
    {-0.05156146, 1.631868, 0.1518916}, // biceps brachii long Org
  {0.01154131, -0.13516626, 0.018559281},  // DT
  {0.016696623, -0.00039992714, -0.024833431},  // LT1
  {-0.00082540943, -0.012710826, -0.027324049},  // LT2
  {0.003164069, -0.038989086, -0.016423415},  // SN
  {-0.02719984, -0.009987236, -0.012128863},  // AN1
  {0.027715547, 0.0071698367, -0.0057678716},  // GT1
  {0.020105379, 0.015216575, 0.011917557},  // GT2
  {-0.0077156438, 0.01371882, 0.021096155},  // GT3
  {-0.026538881, -0.0004654442, -0.016383749},  // AN2
  {-0.021673365, 0.014000697, -0.01353638},  // AN3
  {-0.01648457, 0.022265021, -0.0038823821},  // AN4
  {-0.01317743, 0.018507771, 0.014477503},  // AN5
  {-0.018262619, 0.0062037953, 0.020164777},  // AN6
  {-0.024974365, -0.0059851338, 0.015220258},  // AN7
  {-0.029651189, 0.0068230731, 0.0034415585},  // GHC
  {-0.010086371, -0.07632643, -0.0014750795},  // MLR3
  {-0.01129523, -0.19295007, 0.003155017},  // MLR2
  {0.0081443526, -0.19660154, 0.014871559},  // LRS2
  {0.017467901, -0.071833536, -0.00098610076},  // LRS3
  {-0.003902839, 0.00042691416, 0.025682045},  // GT4
  {0.007900862, 0.023408651, 0.0066904528},  // GT5
  {-0.024046257, -0.011887598, 0.013366981},  // GT6
  {0.033388257, -0.33655971, 0.010108482},  // EpicL
  {-0.03423202, -0.34266743, 0.0036992067},  // EpicM
  {-0.027809806, -0.32783696, 0.0071113692},  // EL
  {-0.015919188, -0.34472224, -0.014407583},  // Cap
  {-0.01063042, -0.34741062, -0.011738211},  // Tr1
  {-0.0047629289, -0.34615725, -0.0091299638},  // Tr2
  {0.0021650915, -0.34549543, -0.0087788701},  // Tr3
  {0.0093172612, -0.34485054, -0.0076008025},  // Tr4
  {0.020302692, -0.34592429, -0.0094405897},  // Tr5
  {-0.028273543, -0.33735278, -0.00343668},  // EM
  {-0.032413241, -0.34586412, -0.0032725355},  // EM1
  {-0.0088122943, -0.32303444, -0.0048105},  // CF1
  {-0.012343063, -0.3320491, -0.0090536661},  // CF2
  {0.018194068, -0.32882839, -0.0013741548},  // RF
  {-0.014553924, -0.26859215, 0.0064969757},  // MLR1
  {0.015702257, -0.28087083, 0.018023023},  // LSR1
  {-0.0016646972, -0.32719505, -0.00095377932},  // OF
  {-0.010277782, -0.14014132, 0.0041358843},  // MLR4
};

AnyStringArray PointsName1 = {
  "Origin",
  "gh",
  "condylus_hum",
  "condylus_humT",
  "supra 1 Ins",
  "supra 2 Ins",
  "supra 3 Ins",
  "supra 4 Ins",
  "supra 5 Ins",
  "supra 6 Ins",
  "infra 1 Ins",
  "infra 2 Ins",
  "infra 3 Ins",
  "infra 4 Ins",
  "infra 5 Ins",
  "infra 6 Ins",
  "subscap 1 Ins",
  "subscap 2 Ins",
  "subscap 3 Ins",
  "subscap 4 Ins",
  "subscap 5 Ins",
  "subscap 6 Ins",
  "teres minor 1 Ins",
  "teres minor 2 Ins",
  "teres minor 3 Ins",
  "teres minor 4 Ins",
  "teres minor 5 Ins",
  "teres minor 6 Ins",
  "via point 1 biceps brachii long",
  "via point 2 biceps brachii long",
  "biceps brachii long Ins",
  "biceps brachii long Org",
  "DT",
  "LT1",
  "LT2",
  "SN",
  "AN1",
  "GT1",
  "GT2",
  "GT3",
  "AN2",
  "AN3",
  "AN4",
  "AN5",
  "AN6",
  "AN7",
  "GHC",
  "MLR3",
  "MLR2",
  "LRS2",
  "LRS3",
  "GT4",
  "GT5",
  "GT6",
  "EpicL",
  "EpicM",
  "EL",
  "Cap",
  "Tr1",
  "Tr2",
  "Tr3",
  "Tr4",
  "Tr5",
  "EM",
  "EM1",
  "CF1",
  "CF2",
  "RF",
  "MLR1",
  "LSR1",
  "OF",
  "MLR4"
};
