// Morphs the original scapula stl to extend the length of the acromion in the x direction

//Scapula morphing
#define BM_SCALING _SCALING_STANDARD_

HumanModel.Scaling.GeometricalScaling = {

  #define CUSTOM_SCALING_Right_Scapula
  Right.Scapula= {
    #include "Scapula/ScalingLawScapula.any"
    AnyFunTransform3D &ScaleFunction = MyScalingLaw.MyTransform;
  };

  #define CUSTOM_SCALING_Right_Humerus
  Right.Humerus= {
    #include "Humerus/ScalingLawHumerus.any"
    AnyFunTransform3D &ScaleFunction = MyScalingLaw.MyTransform;
  };


}; // GeometricalScaling
